# Traeger Grills Model
# Firepot Dimensions
T(t) := sin(t)
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# Enthalpy Balance
V_pot := π*(3 in)^2*5*in = 0.0818123 ft^3
kJ := 1000 J
P := 1 atm
R_g := 8.314*J/(mol*K) = 0.00437786 International_BTU/(mol*R)
h_comb := 8450*BTU/lb
T(t) := -2.8571*t^2 + 57.143*t + 397.14
T_amb := 70 °F
d/dt(T(t)) → -5.7142*t + 57.143
k_0 := 33884*1/s = 2033040 1/min
T_ref := 100 °F
Cp_wood(T) := (0.1031 + 0.003867*T/R)*BTU/(lb*R)
E := 16.5*1000*cal/mol = 65.4773 International_BTU/mol
T := 700 °F
Cp_wood(600 °F) = 4.20084 International_BTU/(lb*R)
# Sample temperature
M_pellet := 0.744146667 gm
M_wood := 35*M_pellet = 26.0451 gm
M_wood.rxn := M_wood*k_0*exp(-E/(R_g*T)) = 0.292442 lb/min
M_wood.rxn = 2.21082 gm/s
# Heat Capacity | Molecular Weight | Heat of Formation | Gas densities at room temperature
Cp_O2 := 0.919*kJ/(kg*K) = 0.219499 International_BTU/(lb*R)
MW_O2 := 2*16*gm/mol = 0.0705479 lb/mol
h_O2.f := 0*BTU/lb
ρ_O2 := 1.429*gm/L = 0.0892096 lb/ft^3
Cp_N2 := 1.04*kJ/(kg*K) = 0.2484 International_BTU/(lb*R)
MW_N2 := 2*14*gm/mol = 0.0617294 lb/mol
h_N2.f := 0*BTU/lb
ρ_N2 := 0.0727*lb/ft^3
ρ_air := 1.2041*kg/m^3 = 0.0751695 lb/ft^3
Cp_air := 1.01*kJ/(kg*K) = 0.241234 International_BTU/(lb*R)
MW_air := 0.21*MW_O2 + 0.79*MW_N2 = 0.0635813 lb/mol
h_air.f := 0*BTU/lb
M_air.in := 6.6942*lb/min
ρ_CO2 := 0.1150*lb/ft^3
Cp_CO2 := 0.844*kJ/(kg*K) = 0.201586 International_BTU/(lb*R)
MW_CO2 := (12 + 2*16)*gm/mol = 0.0970034 lb/mol
h_CO2.f := -393.509*kJ/mol*MW_CO2^-1 = -3844.96 International_BTU/lb
Cp_H2O := 1.97*kJ/(kg*K) = 0.470526 International_BTU/(lb*R)
MW_H2O := (2*1 + 16)*gm/mol = 0.0396832 lb/mol
h_H2O.f := -241.818*kJ/mol*MW_H2O^-1 = -5775.72 International_BTU/lb
ρ_H2O := 0.048*lb/ft^3
Cp_wood := 1.76*kJ/(kg*K) = 0.420369 International_BTU/(lb*R)
MW_wood := (32*12 + 46 + 21*16)*gm/mol = 1.68874 lb/mol
h_wood.f := -5.3*10^6*J/kg = -2278.59 International_BTU/lb
M_wood.in := 0.022046*lb/min
ρ_wood := 1133.423232*kg/m^3 = 70.7573 lb/ft^3
Cp_vol := 2*kJ/(kg*K) = 0.477692 International_BTU/(lb*R)
MW_vol := MW_wood = 1.68874 lb/mol
h_vol.f := -h_wood.f = 2278.59 International_BTU/lb
# Pulled from thin air: need
# to get an accurate value.
M_in := M_wood.in + M_air.in = 6.71625 lb/min
h_wood.in := h_wood.f + Cp_wood*(T_amb - T_ref) = -2291.2 International_BTU/lb
h_air.in := h_air.f + Cp_air*(T_amb - T_ref) = -7.23703 International_BTU/lb
h_in := h_air.in + h_wood.in = -2298.44 International_BTU/lb
ρ_pellet := 1133.423232*kg/m^3
M_pellet := 0.744146667 gm
M_wood := 35*M_pellet = 26.0451 gm
# Guess Values
Y_vol := 0.2
Y_O2 := 0.2
Y_N2 := 0.2
Y_CO2 := 0.2
Y_H2O := 0.2  # Initialize to stoichiometric combustion products
M_wood = 0.0574197 lb
V_gas := V_pot - M_wood/ρ_wood = 0.0810008 ft^3
ρ_gas := 0.037*lb/ft^3
M_gas := ρ_gas*V_gas = 0.00299703 lb
MW_gas := 34.117*gm/mol
N_gas := M_gas/MW_gas = 0.0398461 mol
M_wood.rxn := M_wood*k_0*exp(-E/(R_g*T)) = 0.292442 lb/min  # #h_out = h_gas # Assuming no wood leaves the firepot in solid form
exp(-E/(R_g*T)) = 2.50514e-6
h_wood.f = -2278.59 International_BTU/lb
ΔH_f.wood := conj(h_comb) + 36*h_CO2.f + 23*h_H2O.f = -262810 International_BTU/lb
h_vol := Y_vol*(h_vol.f + Cp_vol*(T - T_ref)) = 513.041 International_BTU/lb
ΔH_rxn := (32*h_CO2.f + 23*h_H2O.f + 3.76*33*h_N2.f) - (h_wood.f + 33*h_O2.f + 3.76*33*h_N2.f) = -253602 International_BTU/lb
# Where does 8500 BTU/lb come from?
h_O2 := Y_O2*(h_O2.f + Cp_O2*(T - T_ref)) = 26.3399 International_BTU/lb
h_wood := h_wood.f + Cp_wood*(T - T_ref) = -2026.37 International_BTU/lb
n_O2.in := 0.21*M_air.in = 1.40578 lb/min
h_O2.f = 0
h_N2 := Y_N2*(h_N2.f + Cp_N2*(T - T_ref)) = 29.808 International_BTU/lb
h_N2.f = 0
h_CO2 := Y_CO2*(h_CO2.f + Cp_CO2*(T - T_ref)) = -744.802 International_BTU/lb
n_H2.in := 0.79*M_air.in = 5.28842 lb/min
h_wood.f = -2278.59 International_BTU/lb
h_H2O := Y_H2O*(h_H2O.f + Cp_H2O*(T - T_ref)) = -1098.68 International_BTU/lb
MW_gas := (Y_vol/MW_vol + Y_O2/MW_O2 + Y_N2/MW_N2 + Y_CO2/MW_CO2 + Y_H2O/MW_H2O)^-1
ρ_gas := MW_gas*P/(R_g*T)
V_gas := V_pot - M_wood/ρ_wood
M_gas := ρ_gas*V_gas
# Assuming the same volume of gas is leaving the firepot as is coming in
M_out := M_air.in*ρ_gas/ρ_air
M_total := M_wood + M_gas
h_gas := h_vol + h_O2 + h_N2 + h_CO2 + h_H2O = -1274.3 International_BTU/lb
h_total := (M_gas*h_gas + M_wood*h_wood)/M_total
h_comb := 8450*BTU/lb
M_wood.rxn*h_comb*s = 43453.1 J  # This was added to the T balance
M_wood.rxn*h_comb*s
T := (h_total*M_total - M_gas*(Y_vol*h_vol.f + Y_O2*h_O2.f + Y_N2*h_N2.f + Y_CO2*h_CO2.f + Y_H2O*h_H2O) - M_wood*h_wood.f)/(M_gas*(Y_vol*Cp_vol + Y_O2*Cp_O2 + Y_N2*Cp_N2 + Y_CO2*Cp_CO2 + Y_H2O*Cp_H2O) + M_wood*Cp_wood) = 19.1572 °F
# Initialize to Stoichiometric Combustion Products
M_wood.rxn = 0.292442 lb/min
M_air.in = 6.6942 lb/min
M_wood.in = 0.022046 lb/min
M_gas.test := M_vol + M_O2 + M_N2 + M_CO2 + M_H2O
Y_vol := M_vol/M_gas
Y_O2 := M_O2/M_gas
Y_N2 := M_N2/M_gas
Y_CO2 := M_CO2/M_gas
Y_H2O := M_H2O/M_gas
y_vol := 0
y_O2 := 0  # y
# Correctly Solved for Temperature
Guess
T := 700 °F
Y_vol := 0
Y_O2 := 0
Y_N2 := 0.693
Y_CO2 := 0.179
Y_H2O := 0.128
h_vol := Y_vol*(h_vol.f + Cp_vol*(T - T_ref)) = 0 International_BTU/lb
h_O2 := Y_O2*(h_O2.f + Cp_O2*(T - T_ref)) = 0 International_BTU/lb
h_N2 := Y_N2*(h_N2.f + Cp_N2*(T - T_ref)) = 103.285 International_BTU/lb
h_CO2 := Y_CO2*(h_CO2.f + Cp_CO2*(T - T_ref)) = -666.598 International_BTU/lb
h_H2O := Y_H2O*(h_H2O.f + Cp_H2O*(T - T_ref)) = -703.156 International_BTU/lb
Given
h_vol == Y_vol*(h_vol.f + Cp_vol*(T - T_ref))
h_O2 == Y_O2*(h_O2.f + Cp_O2*(T - T_ref))
h_N2 == Y_N2*(h_N2.f + Cp_N2*(T - T_ref))
h_CO2 == Y_CO2*(h_CO2.f + Cp_CO2*(T - T_ref))
h_H2O == Y_H2O*(h_H2O.f + Cp_H2O*(T - T_ref))
h_gas == h_vol + h_O2 + h_N2 + h_CO2 + h_H2O
ρ_gas == MW_gas*P/(R_g*T)
M_gas == ρ_gas*V_gas
h_total == (M_gas*h_gas + M_wood*h_wood)/M_total
h_total*M_total == M_gas*(Y_vol*(h_vol.f + Cp_vol*(T - T_ref)) + Y_O2*(h_O2.f + Cp_O2*(T - T_ref)) + Y_N2*(h_N2.f + Cp_N2*(T - T_ref)) + Y_CO2*(h_CO2.f + Cp_CO2*(T - T_ref)) + Y_H2O*(h_H2O.f + Cp_H2O*(T - T_ref))) + M_wood*(h_wood.f + Cp_wood*(T - T_ref))
T := Find(T)
T =  # error: This variable is undefined.
M_wood.rxn := M_wood*k_0*exp(-E/(R_g*T)) = 0.292442 lb/min
# Not
# used
# here:
M_in = 6.71625 lb/min
h_in = -2298.44 International_BTU/lb
M_out = 3.58804 lb/min
h_gas = -1274.3 International_BTU/lb
M_wood.rxn =  # error
h_comb = 8450 International_BTU/lb
d/dt(h_total*M_total) == M_in*h_in - M_out*h_gas
h_total*M_total = -127147 J
hM_initial := 200 J
d/dt(M_wood) == M_wood.in - M_wood.rxn
M_wood.initial := 1 lb
y_init := [hM_initial/J; M_wood.initial/lb] = [200; 1]
D(t, y) := [M_in*h_in - M_out*h_gas + M_wood.rxn*h_comb; M_wood.in - M_wood.rxn]
soln := Rkadapt(y_int, 0, 10, 10, D)
M_in*h_in = -271446 W
h_in = -5346167 m^2/s^2
M_out*h_gas = -80399.2 W
h_comb = 19654700 m^2/s^2
M_wood.rxn*h_comb =  # error
# Mass Balance
ρ_gas = 0.645388 kg/m^3
MW_gas = 0.0341174 kg/mol
M_gas.in := M_air.in
V_pot = 0.0818123 ft^3
M_gas.out := M_gas.in + M_wood.rxn = 6.98664 lb/min
V_gas = 2.29369 L
M_gas = 0.00326355 lb
M_vol.rxn := M_wood.rxn = 0.292442 lb/min
Y_vol := M_vol/M_gas
Y_vol.in := 0
M_O2.rxn := -M_wood.rxn*33*MW_O2/MW_wood = -0.403158 lb/min
Y_O2 := M_O2/M_gas
Y_O2.in := 0.21*ρ_O2/ρ_air = 0.249223
M_N2.rxn := 0  # **These equal zero if Y_O2 <= 0
Y_N2 := M_N2/M_gas
Y_N2.in := 0.79*ρ_N2/ρ_air = 0.764047
M_CO2.rxn := M_wood.rxn*32*MW_CO2/MW_wood = 0.537543 lb/min
Y_CO2 := M_CO2/M_gas
Y_CO2.in := 0
d/dt(M_wood) == M_wood.in - M_wood.rxn
M_H2O.rxn := M_wood.rxn*23*MW_H2O/MW_wood = 0.158056 lb/min
Y_H2O := M_H2O/M_gas
Y_H2O.in := 0
d/dt(M_vol) == M_gas.in*Y_vol.in - M_gas.out*Y_vol + M_vol.rxn
# $M_wood = M_wood_in - M_wood_rxn
#
# $M_vol = M_gas_in * Y_vol_in - M_gas_out * Y_vol + M_wood_rxn # vol = volatiles (gaseous wood)
#
# $M_O2 = M_gas_in * Y_O2_in - M_gas_out * Y_O2 + M_O2_rxn
#
# $M_N2 = M_gas_in * Y_N2_in - M_gas_out * Y_N2 + M_N2_rxn
#
# $M_CO2 = M_gas_in * Y_CO2_in - M_gas_out * Y_CO2 + M_CO2_rxn
#
# $M_H2O = M_gas_in * Y_H2O_in - M_gas_out * Y_H2O + M_H2O_rxn
d/dt(M_O2) == M_gas.in*Y_O2.in - M_gas.out*Y_O2 + M_O2.rxn
d/dt(M_N2) == M_gas.in*Y_N2.in - M_gas.out*Y_N2 + M_N2.rxn
d/dt(M_CO2) == M_gas.in*Y_CO2.in - M_gas.out*Y_CO2 + M_CO2.rxn
d/dt(M_H2O) == M_gas.in*Y_H2O.in - M_gas.out*Y_H2O + M_H2O.rxn
M_wood.initial := 1 lb
M_vol.initial := 0 lb
D(t, M_wood, M_vol, M_O2, M_N2, M_CO2, M_H2O) == [
    M_wood.in - M_wood.rxn;
    M_gas.in*Y_vol.in - M_gas.out*Y_vol + M_vol.rxn;
    M_gas.in*Y_O2.in - M_gas.out*Y_O2 + M_O2.rxn;
    M_gas.in*Y_N2.in - M_gas.out*Y_N2 + M_N2.rxn;
    M_gas.in*Y_CO2.in - M_gas.out*Y_CO2 + M_CO2.rxn;
    M_gas.in*Y_CO2.in - M_gas.out*Y_CO2 + M_CO2.rxn
]
M_O2.initial := 0.5 lb
M_N2.initial := 0.5 lb
M_CO2.initial := 0.1 lb
y == [M_wood; M_vol; M_O2; M_N2; M_CO2; M_H2O]
D(t, y) := [
    (M_wood.in - M_wood.rxn)/(lb/s);
    M_gas.in/(lb/s)*Y_vol.in - M_gas.out/(lb/s)*M_vol/M_gas + M_vol.rxn/(lb/s);
    M_gas.in/(lb/s)*Y_O2.in - M_gas.out/(lb/s)*M_O2/M_gas + M_O2.rxn/(lb/s);
    M_gas.in/(lb/s)*Y_N2.in - M_gas.out/(lb/s)*M_N2/M_gas + M_N2.rxn/(lb/s);
    M_gas.in/(lb/s)*Y_CO2.in - M_gas.out/(lb/s)*M_N2/M_gas + M_CO2.rxn/(lb/s);
    M_gas.in/(lb/s)*Y_CO2.in - M_gas.out/(lb/s)*M_N2/M_gas + M_CO2.rxn/(lb/s)
]
M_H2O.initial := 0 lb
y_init := [
    M_wood.initial/lb;
    M_vol.initial/lb;
    M_O2.initial/lb;
    M_N2.initial/lb;
    M_CO2.initial/lb;
    M_H2O.initial/lb
] = [1; 0; 0.5; 0.5; 0.1; 0]
soln := Rkadapt(y_init, 0, 10, 10, D)
# M_wood_in = 0.022046 # lb/min
# M_air_in = 6.6942 # lb/min
# M_gas_in = M_air_in
# Y_O2_in = M_air_in * 0.21 * MW_O2 # Should this be different since 0.21 is Vol%? Vol% is like Mol%, so should correct for MW
# Y_N2_in = M_air_in * 0.79 * MW_N2 # Should this be different since 0.79 is Vol%?
# Y_vol_in = 0 # No volatiles are coming into the firepot
# Y_H2O_in = 0 # No water in the air coming in, but should we deal with the water in the pellets (~10 wt%) here?
# Y_CO2_in = 0 # No CO2 coming into the firepot
#
# Variables
# # Should have the same number of variables as equations
#
# M_wood = 1 # lb (amount of wood in the firepot) --> Need to figure out what to put here
# M_vol = 0 # Need to initialize to stoichiometric combustion products
# M_O2 = 0 # Need to initialize to stoichiometric combustion products
# M_N2 = 0 # Need to initialize to stoichiometric combustion products
# M_CO2 = 0 # Need to initialize to stoichiometric combustion products
# M_H2O = 0 # Need to initialize to stoichiometric combustion products
#
# End Variables
#
# Equations
# # Differential Equations - Need to initialize to stoichiometric combustion products
# # $x = dx/dt ($ = time differential)
#
# $M_wood = M_wood_in - M_wood_rxn
#
# $M_vol = M_gas_in * Y_vol_in - M_gas_out * Y_vol + M_wood_rxn # vol = volatiles (gaseous wood)
#
# $M_O2 = M_gas_in * Y_O2_in - M_gas_out * Y_O2 + M_O2_rxn
#
# $M_N2 = M_gas_in * Y_N2_in - M_gas_out * Y_N2 + M_N2_rxn
#
# $M_CO2 = M_gas_in * Y_CO2_in - M_gas_out * Y_CO2 + M_CO2_rxn
#
# $M_H2O = M_gas_in * Y_H2O_in - M_gas_out * Y_H2O + M_H2O_rxn
#
# End Equations
#
# End Model
#
# # Independent Differential Variable: Time (min)
# #t(0) = 0
# #t(f) = 20
D(t, y) := [M_in*h_in - M_out*h_gas + M_wood.rxn*h_comb; M_wood.in - M_wood.rxn]
soln := Rkadapt(y_int, 0, 10, 10, D)
Given
-M_wood*'(t) + M_wood.in - M_wood.rxn == 0
M_wood(0) == 1
-M_vol*'(t) + M_gas.in*Y_vol.in - M_gas.out*Y_vol + M_vol.rxn == 0
M_vol(0) == 0
-M_O2*'(t) + M_gas.in*Y_O2.in - M_gas.out*Y_O2 + M_O2.rxn == 0
M_O2(0) == 0.5
-M_N2*'(t) + M_gas.in*Y_N2.in - M_gas.out*Y_N2 + M_N2.rxn == 0
M_N2(0) == 0.5
-M_CO2*'(t) + M_gas.in*Y_CO2.in - M_gas.out*Y_CO2 + M_CO2.rxn == 0
M_CO2(0) == 0.1
-M_H2O'(t) + M_gas.in*Y_H2O.in - M_gas.out*Y_H2O + M_H2O.rxn == 0
M_H2O(0) == 0
y := Odesolve(t, 10)  # error: Too few initial conditions.
# Equations for powerpoint slide
# Enthalpy Balance around firepot
# Mass Balance around firepot
d/dt(M_wood) == M_wood.in - M_wood.rxn
d/dt(h_total*M_total) == M_in*h_in - M_out*h_gas + M_wood.rxn*h_comb
d/dt(M_vol) == M_gas.in*Y_vol.in - M_gas.out*Y_vol + M_vol.rxn
M_total := M_wood + M_gas
h_total := (M_gas*h_gas + M_wood*h_wood)/M_total
d/dt(M_O2) == M_gas.in*Y_O2.in - M_gas.out*Y_O2 + M_O2.rxn
M_in := M_wood.in + M_air.in
h_in := h_air.in + h_wood.in
d/dt(M_N2) == M_gas.in*Y_N2.in - M_gas.out*Y_N2 + M_N2.rxn
h_gas := h_vol + h_O2 + h_N2 + h_CO2 + h_H2O
M_out := M_air.in*ρ_gas/ρ_air
d/dt(M_CO2) == M_gas.in*Y_CO2.in - M_gas.out*Y_CO2 + M_CO2.rxn
C_32*H_46*O_21 + 33*O_2 + 33*3.76*N_2 == 32*CO_2 + 23*H_2*O + 33*3.76*N_2
d/dt(M_H2O) == M_gas.in*Y_H2O.in - M_gas.out*Y_H2O + M_H2O.rxn
M_wood.rxn := M_wood*k_0*exp(-E/(R_g*T))
h_comb := 8450*BTU/lb
