MW_CO2 := (12 + 2*16)*gm/mol = 44 gm/mol
# Traeger Grills Model
kJ := 1000 J
Cp_air := 1.01*kJ/(kg*K) = 254.516 J/(R*lb)
ρ_air := 1.2041*kg/m^3 = 0.0751695 lb/ft^3
# General specifications for Traeger barbecue pellets are: 100% hardwood, 1" long or less in length, 1/4" diameter, less than 2% ash content, less than 2% fines, 10% moisture content, 8500 BTU's per lb, and about 40 lbs per cubic ft. density.
MW_H2O := (2*1 + 16)*gm/mol = 18 gm/mol
Cp_O2 := 0.919*kJ/(kg*K) = 231.584 J/(R*lb)
# Questions:
Cp_N2 := 1.04*kJ/(kg*K) = 262.076 J/(R*lb)
H_f.H2O := -241.818*kJ/mol/MW_H2O = -6093711 J/lb
# Accurate measurements:
# Air flow rate
# Pellet load rate
# Effluent: Temperature, flow rate
# How to do it, what it would take
# How much mass of pellet does the auger deliver in 15 seconds?
# What is the heat flux from the firepot?
# How much does the temperature of the firepot fluctuate?
# What is the velocity of the air coming out of the blower fan?
# How long does it take a pellet to burn completely?
# How nonlinear is the pellet combustion process?
# Does ash residue build up in the firepot?
# What rate does the auger have to have in order to maintain a constant temperature? How good is it at doing so?
Cp_CO2 := 0.844*kJ/(kg*K) = 212.684 J/(R*lb)
H_f.wood := -5.3*10^6*J/kg = -2404040 J/lb
Cp_H2O := 1.97*kJ/(kg*K) = 496.432 J/(R*lb)
H_f.CO2 := -393.509*kJ/mol/MW_CO2 = -4056652 J/lb
Cp_wood := 1.76*kJ/(kg*K) = 443.513 J/(R*lb)
# Notes: | 2.89 lbs / hour | (Came from Eric)
# The energy released by the fire is proportional to the amount of fuel that is buring.
# S1 = 50/65  ! Constant relating stoker rate to coal flowrate (lb/hr-%)
# A1 = 600/62.6  ! Constant relating Forced Draft motor speed to air mass flow rate (lb/hr-%)
# Pellet Properties:
# Auger Properties:
# Auger rate minimum = 15 seconds on, 45 seconds off
# maxmimum = 60 seconds on, 0 seconds off
HHV := 9142*BTU/lb
load := 10 gm/(15 s) = 0.666667 gm/s
S_rate_min := 15 s/(60 s) = 0.25  # 25% on
minimum := S_rate_min*load = 1.32277 lb/hr
ρ_pellet := 40*lb/ft^3 = 640.739 kg/m^3
10 gm = 0.0220462 lb
load = 5.29109 lb/hr
S_rate_max := 60 s/(60 s) = 1  # 100% on
maximum := S_rate_max*load = 5.29109 lb/hr
15 s = 0.00416667 hr
S1 := load/100 = 0.000881849 lb/min
moisture := 0.1
avg := (minimum + maximum)/2 = 3.30693 lb/hr
S_rate := 35
ash := 0.02
m_wood.in := minimum = 0.0220462 lb/min
# Firepot:
fines := 0.02  # CHx + a(3.76*N2 + O2) --> CO + H20 + NO
D_pellet := 1/4*in = 6.35 mm  # Conduction
q_air := 100*ft^3/min  # Air from fan (likely standard T and P)
q_cond == k*A*(T_hot - T_cold)/L
# Grill Properties:
ρ_air := 0.06694247*lb/ft^3
ρ_air = 1.07232 kg/m^3
V_firepot := π*(3 in)^2*5*in = 0.0818123 ft^3
A_hs := π*(3 in)^2 = 0.19635 ft^2
Convection
MW_air := (0.21*32 + 0.79*28)*gm/mol = 28.84 gm/mol
q_conv == h*(T_hot - T_cold)*A
m_air.in := q_air*ρ_air = 401.655 lb/hr
P_amb := 1 atm
T_amb := 66.82 °F = 292.494 K
m_air.in = 6.69425 lb/min
R_g := 8.314*J/(mol*K)
V_grill := π*(1.5 ft)^2*4*ft = 28.2743 ft^3  # Radiation
q_rad == (ε*α*T_hot^4)*A
ρ_air := MW_air*P_amb/(R_g*T_amb) = 1.20167 kg/m^3
# M_boiler*Cp_boiler*$T_boiler = M_coal*Cp_coal*(T_amb-T_boiler) + M_air*Cp_air*(T_amb-T_boiler) + Q_comb - Q_rad - Q_conv
# Q_rad = 0.7 * Q_comb
# Q_conv = 0
m_air.firepot.initial := ρ_air*V_firepot = 0.00613737 lb
# M_air  = A1 * FD_rate  ! Mass flow rate of air (lbs/hr)
#
# M_ash  = x_ash * M_coal  ! Mass flow rate of ash (lbs/hr)
# M_flue = M_air + (1 - x_ash) * M_coal  ! Mass flow rate of flue gas (lb/hr)
# x[0] = M_coal
#
# Q_comb = M_comb*h_comb
m_flue.grill := ρ_air*V_grill = 2.12107 lb
m_air*c_p.air*dT_air/dt == m_in*h_in - m_out*h_out + m*ΔH_rxn - U*A*(T_g - T_air) + ε*σ*(T_inf^4 - T_g^4)
Accum == in - out + gen - cons
dh/dT == h_in - h_out + h_gen - h_cons
# Equations
# ! note: the $ denotes time differential
# !  (e.g. $x is dx/dt)
#
# ! overall mass balance
# !$M_bed = M_coal + M_air - M_ash -M_flue
#
# M_bed = 60000
#
# ! energy balance
# M_boiler*Cp_boiler*$T_boiler = M_coal*Cp_coal*(T_amb-T_boiler) + M_air*Cp_air*(T_amb-T_boiler) + Q_comb - Q_rad - Q_conv
#
# M_water*Cp_water*$T_water_out = Q_rad + Q_conv + Q_water*Cp_water*(T_water_in - T_water_out)
#
# tau_lag*$x[1:25] = -x[1:25] + x[0:24]
#
# M_comb = x[25]
#
# M_coal = S1 * S_rate  ! Mass flow rate of coal (tons/hr)
#
# T_rate = $T_boiler
#
# !the diffence in pipe wall temperature and water temperature
# Q_rad = T_delta_pipe*(A_hs*k_csteel)/ pipe_thickness
# T_pipe_rate = $T_delta_pipe
#
# End Equations
ρ(T)*V*Cp(T)*dT/dt == ρ_in(T_in)*V_in*Cp_in(T_in - T_ref) - ρ_out(T)*V_out*Cp_out(T_out - T_ref) + m_in*ΔH_rxn(T - T_ref) - UA*(T - T_amb) + ε*σ*(T_inf^4 - T_g^4)
# Model adapted from coal boiler
# Parameters
A1 := 60000/62.6 = 958.466
m_boiler := 200000
Cp_boiler := 0.11
x_ash := 0.1
Cp_coal := 0.29
S1 := 5000/65 = 76.9231
h_comb := 8500
Cp_ash := 0.29
FD_rate := 62.6
# Variables
# Manipulated Variables
S_rate := 64.89  # Stoker rate (%)
# Differential States
m_bed := 60000
T_boiler := 1000
T_water.out := 399.45
# Combustion Kinetics
kJ := 1000 J
m_comb
y_p := 92.97
m_coal
k_0 := 33884*s^-1
# Intermediates
E := 16.5*kcal/mol = 69.0822 kJ/mol
R_g := 8.314*J/(mol*K)
m_air := A1*FD_rate = 60000
y == dyp_dt
T := 500 °F = 533.15 K
k_0*exp(-E/(R_g*T)) = 0.00577453 1/s
m_ash := x_ash*m_coal
m_ash == x_ash*m_coal
m_flue := m_air + (1 - x_ash)*m_coal
m_flue == m_air + (1 - x_ash)*m_coal
Given
y'(x) - (y_p - x)*(k_0*s)*exp(-E/(R_g*T)) == 0
Q_comb := m_comb*h_comb
y(0) == 0
T_flue := T_boiler
# How does time relate?
y := Odesolve(x, y_p)
Q_rad := 0.7*Q_comb
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Q_conv := 0
t := (400 - 32)*5/9 + 273.15 = 477.594
m_water := 1000
t := 400 °F = 477.594 K
# Overall mass balance
SA_grill := 4 ft*2*π*2*ft = 50.2655 ft^2
dm_bed/dt == m_coal + m_air - m_ash - m_flue
V_grill := 4 ft*π*(2*ft)^2 = 50.2655 ft^3
y(T) := (y_p - 0)*k_0*exp(-E/(R_g*T))
m_coal == S1*S.rate
A_firepot := π*(2 in)^2 = 0.0872665 ft^2
R_g = 1.98576 cal/(mol*K)
y(200 °F) = 0.000448476 1/s
T_rate := dT_boiler/dt
m_grill := 50 lb
2 lb*y(T) = 3865.38 lb/hr
y(1000 °F) = 111.778 1/s
SA_firepot := 2*π*2*in*5*in = 0.436332 ft^2
# Energy Balance
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Boiler
m_boiler*Cp_boiler*dT_boiler/dt == m_coal*Cp_coal*(T_amb - T_boilier) + m_air*Cp_air*(T_amb - T_boiler) + Q_comb - Q_rad - Q_conv
Grill
m_boiler*Cp_boiler*dT_boiler/dt == m_coal*Cp_coal*(T_amb - T_boilier) + m_air*Cp_air*(T_amb - T_boiler) + Q_comb - Q_rad - Q_conv
Q_comb == m_comb*h_comb
Q_rad == 0.7*Q_comb
Q_conv == 0
# Manipulated Variable
# Combined constants and equations
S_rate := 64.89  # Stoker rate (%)
# Constants
# Differential States
A1 := 60000/62.6 = 958.466
m_boiler := 200000
Cp_boiler := 0.11
m_bed := 60000
x_ash := 0.1
Cp_coal := 0.29
S1 := 5000/65 = 76.9231
T_boiler := 1000
h_comb := 8500
Cp_ash := 0.29
FD_rate := 62.6
T_water.out := 399.45
Cp_air := 0.2392
m_air := A1*FD_rate = 60000  # m_comb
S.rate := 64.89
T_flue := T_boiler
m_coal
T_amb := 66.82
# Equations | m_comb | T_boiler | m_coal
m_boiler*Cp_boiler*dT_boiler/dt == m_coal*Cp_coal*(T_amb - T_boiler) + m_air*Cp_air*(T_amb - T_boiler) + Q_comb - Q_rad - Q_conv
Q_comb == m_comb*h_comb
dm_bed/dt == m_coal + m_air - m_ash - m_flue
Q_rad == 0.7*Q_comb
Q_conv == 0
m_coal := S1*S.rate = 4991.54
m_ash := x_ash*m_coal = 499.154
m_flue := (m_air + (1 - x_ash)*m_coal) = 64492.4
# ********************Continue here, investigating all that is needed to finish
# Combined Equations
m_boiler*Cp_boiler*dT_boiler/dt == m_coal*Cp_coal*(T_amb - T_boiler) + m_air*Cp_air*(T_amb - T_boiler) + m_comb*h_comb - 0.7*(m_comb*h_comb)
dm_bed/dt == m_coal + m_air - x_ash*m_coal - (m_air + (1 - x_ash)*m_coal) == m_coal - x_ash*m_coal - (1 - x_ash)*m_coal == 0
T_g == Grill_wall_temperature
# Assumptions:
# Ignore soot particles / smoke
# T inside grill = T gas exiting grill
# Exit gas is a combination of air and CO2 (gnore soot)
m_water := 1000
gas == outlet_gas
air == inlet_gas
ρ_gas(T)*V_gas*Cp_gas(T)*dT/dt == ρ_air(T_amb)*V_air.in*Cp_air(T_amb - T_ref) - ρ_gas(T)*V_gas*Cp_gas(T_out - T_ref) + m_pellets*HHV_pellets*η_efficiency - UA*(T - T_amb) + ε*σ*(T_inf^4 - T_g^4)
# How do we account for accumulation of heat in the metal inside the grill?
# The models are rated for a certain capacity
# 2.89 lbs / hour
# Ignore radiative heat transfer at low temperature
# Firepot temperatures are close to 1000 degrees.
# They are all over the place--which is one of the challenges
# Assume that everything burns to completion, and don't assume the kinetics are a limiting factor at all.
# How much air is being pulled through?
# Start fairly simple, state all the assumptions that you make. Then when we look at the situatino, if it doesn't
# add up, then we can go back and examine the assumptions.
#
# Converation with David Johnson at DornerWorks on Monday. There's a $50 piece of hardware that we can use to reprogram the controller ourselves. This will work on the new ones. Still continue working on PID with the Arduino. If we can get it working on the arduino without that, we have more flexibility.
# He pointed Eric to where in teh code the PID parameters are at.
# Know the mass of the metal that's heating up in the grill.
# UA --> A is average surface area of the inside of the barrell
# The Deets
# Constants
ORIGIN := 1
P := 1 atm
kmol := 1000 mol
kJ := 1000 J
R_g := 9.324*J/(mol*K)
# Properties
a := transpose([28958, 9390, 3012, 7580, 1484, 0])
Cp_air(T) := (a[1] + a[2]*(a[3]/(T/K)/sinh(a[3]/(T/K)))^2 + a[4]*(a[5]/(T/K)/cosh(a[5]/(T/K)))^2)*J/(1000 mol*K)
Cp_air(300 K) = 28.9955 J/(mol*K)
MW_air := (0.79*(2*14.0067) + 0.21*(2*15.9994))*(gm/mol) = 28.8503 gm/mol
Cp_air(100 °C)/MW_air = 1.00958 kJ/(kg*K)
# Density of Air
T_amb := 66.82 °F = 292.494 K
b := transpose([0.043045, -17.121, 117310, -3.4138e15, 3.038e17, 0])
B(T) := (b[1] + b[2]/(T/K) + b[3]/(T/K)^3 + b[4]/(T/K)^8 + b[5]/(T/K)^9)*m^3/kmol
Z(T) := 1 + B(T)*P/(R_g*T)
V_m(T) := Z(T)*R_g*T/P
ρ_air(T) := MW_air/V_m(T)
t := 75 °F, 80 °F .. 425 °F
ρ_air(T_amb) = 0.0669425 lb/ft^3
# Viscosity of Air
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ρ_air(T_amb) = 1.07232 kg/m^3
c := transpose([1.425e-6, 0.5039, 108.3, 0])
μ_air(T) := c[1]*(T/K)^c[2]/(1 + c[3]/(T/K) + c[4]/(T/K)^2)*Pa*s
μ_air(T_amb) = 1.81839e-5 Pa*s
Pa*s = 1 kg/(m*s)
# Grill properties
D := 2 ft
A_c := π*D^2/4 = 3.14159 ft^2  # Rough estimate of dynamics inside grill
q_air := 100*ft^3/min  # Air from fan (likely standard T and P)
A_inside := 10 ft^2  # Rough estimate of grill inner surface area
t_wall := 1 in  # Rough estimate of grill outer thickness
# Convection inside Grill
v := q_air/A_c = 0.161701 m/s
Re_air(T) := ρ_air(T)*D*v/μ_air(T)  # Assume laminar flow
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h_inside := □  # error: This placeholder is empty.
# Iron Thermal Conductivity
d := transpose([176.77, -0.53805, 0.00097858, -8.7641e-7, 2.9158e-10])
k_iron(T) := (d[1] + d[2]*(T/K) + d[3]*(T/K)^2 + d[4]*(T/K)^3 + d[5]*(T/K)^4)*W/(m*K)
k_iron(200 °F) = 73.1376 W/(m*K)
1/UA == sum(1/(h[i]*A[i]), i) + sum(R[i], i)
# Resistance to heat transfer through grill exterior wall
R_wall == Δx/(k*A)
R_wall := t_wall/(k_iron(300 °F)*A_inside) = 0.405869 K/kW
# http://www.seas.upenn.edu/~meam333/correlation/CorrelationsList.pdf
# Convective heat transfer from outside of grill
T := 400 °F
L_ext := 4 ft
v_ext := 5*mi/hr = 2.2352 m/s
Re_external := ρ_air(T)*L_ext*v_ext/μ_air(T) = 68783.3
# Cylinder in cross flow
Cp_air(T_amb) = 28.9886 J/(mol*K)
μ_air(T_amb) = 1.81839e-5 kg/(m*s)
μ_air(T_amb) = 1.81839e-5 Pa*s
Ra_D == Gr_D*Pr
k_air.20C := 0.0257*W/(m*K)
T_amb = 19.3444 °C
β := 1/T_amb
T_s := 90 °F
T_inf := 4 K
ν := 1.568*m^2/s
Pr := Cp_air(T_amb)*μ_air(T_amb)/k_air.20C = 0.0205107 kg/mol
Gr_L := g*β*(T_s - T_inf)*L_ext^3/ν^2 = 7.44799
NU_d := (0.60 + 0.387*Ra_D^(1/6)/(1 + (0.559/Pr)^(9/16))^(8/27))^2
# Continue...
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